OpenVSP model (file version 5), 37 components.
Geometry view with OpenVSP parameter names; values to 6 digits, angles in degrees, lengths in the model's unit.
Overall bounding box: X_Min=4.4792 X_Len=81.7586 Y_Min=-60 Y_Len=120 Z_Min=-13.0973 Z_Len=28.2536

Wing "frontWing"
  location (X Y Z) 6 0 -1, rotation 0 5 0
  symmetric about XZ
  bounding box size 14.948 58 2.23757
  totals: TotalSpan=58 TotalProjectedSpan=58 TotalChord=15 TotalArea=870 TotalAR=3.86667
  root: chord 15, twist 0, NACA 5-digit CamberLoc=0.15 IdealCl=0.3 ThickChord=0.12
  sections:
    n  Span  Root_Chord  Tip_Chord  Area  Sweep  Sweep_Location  Dihedral  Twist  Twist_Location  tip airfoil
    1  29    15          15         435   0      0.25            0         0      0               as above

Custom "0.25 chord (Front)", child of "frontWing"
  location (X Y Z) 9.75 0 0, rotation 0 0 0
  bounding box size 1 1 1
  Design: Height=1 Length=1 SquareFlag=0 Width=1
  custom script Box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

Stack "Landing Gear", child of "frontWing"
  location (X Y Z) 8 30 -0.0873129, rotation 0 90 0
  symmetric about XZ
  bounding box size 1.33333 61.3333 13.01
  cross sections:
    n  XDelta  YDelta  ZDelta  shape
    0  0       0       0       point
    1  0       0       0       circle Circle_Diameter=1
    2  13.01   0       0       as above
    3  0       0       0       point

Propeller "PropGeom", child of "frontWing"
  location (X Y Z) 4.93443 30 0, rotation 0 0 0
  symmetric about XZ
  bounding box size 0.894545 78.0324 16.1739
  Design: Diameter=18 NumBlade=3 Beta34=20 UseBeta34Flag=1 Feather=0 Rotate=0 Precone=0 ReverseFlag=0 FoldAngle=0 PropMode=0 AF=151.538 CLi=0.538798 Chord=0.177656 Solidity=0.169649 ConstructXoC=0.5 FeatherAxisXoC=0.5 FeatherOffsetXoC=0
  cross sections:
    n  RadiusFrac  shape
    0  0.2         ellipse Ellipse_Height=0.36 Ellipse_Width=0.72
    1  0.4         NACA 16-series Chord=1.49625 IdealCl=0.7 ThickChord=0.144074
    2  1           NACA 16-series Chord=1.17 IdealCl=0.2 ThickChord=0.03
  Chord along r/R (cubic Bezier): 0.2: 0.08, 0.333333: 0.15, 0.466667: 0.2, 0.6: 0.2, 0.716667: 0.2, 0.833333: 0.2, 0.95: 0.2, 0.966667: 0.2, 0.983333: 0.2, 1: 0.13
  Twist along r/R (PCHIP): 0.2: 46.75, 0.75: 20, 1: 13
  Thick along r/R (cubic Bezier): 0.2: 0.5, 0.233333: 0.3, 0.266667: 0.225, 0.3: 0.2, 0.4: 0.125, 0.5: 0.115, 0.6: 0.1, 0.733333: 0.075, 0.866667: 0.055, 1: 0.03
  CLI along r/R (cubic Bezier): 0.2: 0, 0.266667: 0.7, 0.333333: 0.7, 0.4: 0.7, 0.466667: 0.7, 0.533333: 0.7, 0.6: 0.7, 0.733333: 0.7, 0.866667: 0.7, 1: 0.2

Custom "frontWingMAC", child of "frontWing"
  location (X Y Z) 13.5 0 0, rotation 0 0 0
  bounding box size 1 1 1
  Design: Height=1 Length=1 SquareFlag=0 Width=1
  custom script Box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

Custom "Box", child of "frontWing"
  location (X Y Z) 9.52075 32.7789 -6.97143, rotation -60 0 0
  symmetric about XZ
  bounding box size 1.35012 71.8786 10.5503
  Design: Height=0.397709 Length=1.35012 SquareFlag=0 Width=11.9528
  custom script Box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

Wing "rearWing"
  location (X Y Z) 66.25 0 -1, rotation 0 2 0
  symmetric about XZ
  bounding box size 19.9981 120 2.54482
  mass: Density=1 Shell_Flag=1 Mass_Area=1 Mass_Prior=0
  totals: TotalSpan=120 TotalProjectedSpan=120 TotalChord=20 TotalArea=2400 TotalAR=6
  root: chord 20, twist 0, NACA 5-digit CamberLoc=0.15 IdealCl=0.3 ThickChord=0.12
  sections:
    n  Span  Root_Chord  Tip_Chord  Area  Sweep  Sweep_Location  Dihedral  Twist  Twist_Location  tip airfoil
    1  60    20          20         1200  0      0.25            0         0      0.25            as above

Wing "verticalStabilizerUpper", child of "rearWing"
  location (X Y Z) 70 0 1.14625, rotation 90 0 0
  bounding box size 15 1.80081 14.01
  totals: TotalSpan=14.01 TotalProjectedSpan=14.01 TotalChord=11.1 TotalArea=155.511 TotalAR=1.26216
  root: chord 15, twist 0, NACA 4-series Camber=0 CamberLoc=0.2 ThickChord=0.12
  sections:
    n  Span   Root_Chord  Tip_Chord  Area     Sweep  Sweep_Location  Dihedral  Twist  Twist_Location  tip airfoil
    1  14.01  15          7.2        155.511  0      0.25            0         0      0.25            as above

Wing "verticalStabilizerLower", child of "rearWing"
  location (X Y Z) 70 0 1.14625, rotation -90 0 0
  bounding box size 15 1.80081 14.01
  totals: TotalSpan=14.01 TotalProjectedSpan=14.01 TotalChord=11.1 TotalArea=155.511 TotalAR=1.26216
  root: chord 15, twist 0, NACA 4-series Camber=0 CamberLoc=0.2 ThickChord=0.12
  sections:
    n  Span   Root_Chord  Tip_Chord  Area     Sweep  Sweep_Location  Dihedral  Twist  Twist_Location  tip airfoil
    1  14.01  15          7.2        155.511  0      0.25            0         0      0.25            as above

Custom "0.25 chord (Rear)", child of "rearWing"
  location (X Y Z) 71 0 0, rotation 0 0 0
  bounding box size 1 1 1.85083
  Design: Height=1.85083 Length=1 SquareFlag=0 Width=1
  custom script Box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

Custom "rearWingMAC", child of "rearWing"
  location (X Y Z) 76 0 0, rotation 0 0 0
  bounding box size 1 1 1
  Design: Height=1 Length=1 SquareFlag=0 Width=1
  custom script Box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

Custom "CG"
  location (X Y Z) 43 0 0, rotation 0 0 0
  bounding box size 1 1 1
  Design: Height=1 Length=1 SquareFlag=0 Width=1
  custom script Box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

Stack "Vertical motors front"
  location (X Y Z) 31 30 0, rotation 0 -90 0
  symmetric about XZ
  bounding box size 3.61333 63.6133 1.4
  mass: Density=0 Shell_Flag=0 Mass_Area=1 Mass_Prior=0 PointMass=5 CGx=0 CGy=0 CGz=0 Ixx=0 Iyy=0 Izz=0 Ixy=0 Ixz=0 Iyz=0
  cross sections:
    n  XDelta  YDelta  ZDelta  shape
    0  0       0       0       point
    1  0       0       0       circle Circle_Diameter=2.71
    2  1.4     0       0       as above
    3  0       0       0       point

Propeller "PropGeom", child of "Vertical motors front"
  location (X Y Z) 31 30 2.143, rotation 0 90 0; relative location 0 0 2.143, rotation 0 90 0
  symmetric about XZ
  bounding box size 22 82 0
  Design: Diameter=22 NumBlade=3 Beta34=20 UseBeta34Flag=1 Feather=0 Rotate=0 Precone=0 ReverseFlag=0 FoldAngle=0 PropMode=2 AF=151.538 CLi=0.538798 Chord=0.177656 Solidity=0.169649 ConstructXoC=0.5 FeatherAxisXoC=0.5 FeatherOffsetXoC=0
  cross sections:
    n  RadiusFrac  shape
    0  0.2         ellipse Ellipse_Height=0.44 Ellipse_Width=0.88
    1  0.4         NACA 16-series Chord=1.82875 IdealCl=0.7 ThickChord=0.144074
    2  1           NACA 16-series Chord=1.43 IdealCl=0.2 ThickChord=0.03
  blade curves as in "PropGeom"

Stack "Vertical motors rear"
  location (X Y Z) 54 30 0.652174, rotation 0 -90 0
  symmetric about XZ
  bounding box size 3.61333 63.6133 1.4
  cross sections:
    n  XDelta  YDelta  ZDelta  shape
    0  0       0       0       point
    1  0       0       0       circle Circle_Diameter=2.71
    2  1.4     0       0       as above
    3  0       0       0       point

Propeller "PropGeom", child of "Vertical motors rear"
  location (X Y Z) 54 30 2.14286, rotation 0 90 0
  symmetric about XZ
  bounding box size 22 82 0
  Design: Diameter=22 NumBlade=3 Beta34=20 UseBeta34Flag=1 Feather=0 Rotate=0 Precone=0 ReverseFlag=0 FoldAngle=0 PropMode=2 AF=151.538 CLi=0.538798 Chord=0.177656 Solidity=0.169649 ConstructXoC=0.5 FeatherAxisXoC=0.5 FeatherOffsetXoC=0
  cross sections:
    n  RadiusFrac  shape
    0  0.2         ellipse Ellipse_Height=0.44 Ellipse_Width=0.88
    1  0.4         NACA 16-series Chord=1.82875 IdealCl=0.7 ThickChord=0.144074
    2  1           NACA 16-series Chord=1.43 IdealCl=0.2 ThickChord=0.03
  blade curves as in "PropGeom"

Fuselage "Fuselage"
  location (X Y Z) 6 0 0, rotation 0 0 0
  bounding box size 80 13.5065 14.5939
  Design: Length=80
  cross sections:
    n  XLocPercent  YLocPercent  ZLocPercent  shape
    0  0            0            0            point
    1  0.0906762    0            0.00768443   rounded rectangle RoundRectXSec_Radius=0.2 RoundedRect_Height=6.75678 RoundedRect_Width=11.1949
    2  0.1875       0            0            rounded rectangle RoundRectXSec_Radius=0.2 RoundedRect_Height=8.8 RoundedRect_Width=13
    3  0.26875      0            0            as above
    4  0.35         0            -0.03103     rounded rectangle RoundRectXSec_Radius=0.2 RoundedRect_Height=13.75 RoundedRect_Width=10.56
    5  0.564754     0            -0.03103     as above
    6  0.7981       0            0            rounded rectangle RoundRectXSec_Radius=0.2 RoundedRect_Height=8.8 RoundedRect_Width=13
    7  0.915599     0            0.0143475    rounded rectangle RoundRectXSec_Radius=0.2 RoundedRect_Height=6 RoundedRect_Width=11
    8  1            0            0.0169057    point

Conformal "ConformalGeom", child of "Fuselage"
  location (X Y Z) 6 0 0, rotation 0 0 0; relative location 0 0 0, rotation 0 0 0
  bounding box size 78.5736 12.4902 13.5635
  Design: ChordTrimFlag=0 ChordTrimMax=0.9 ChordTrimMin=0.1 EtaTrimMax=0.9 EtaTrimMin=0.1 L01Max=1 L01Min=1 L0LenTrimMax=75.7576 L0LenTrimMin=5.71792 LTrimMax=0.9366 LTrimMin=0.0706914 OffSetEnds=1 Offset=0.5 Side1Trim=0.1 Side1TrimFlag=0 Side2Trim=0.1 Side2TrimFlag=0 Side3Trim=0.1 Side3TrimFlag=0 Side4Trim=0.1 Side4TrimFlag=0 UMaxTrimTypeFalg=0 UMinTrimTypeFalg=0 UTrimFlag=0 UTrimMax=0.9 UTrimMin=0.1 V1TrimBegin=0.9 V1TrimEnd=0.1 V1TrimFlag=0 V2TrimBegin=0.4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

Fuselage "Official Bulkhead Locations", child of "Fuselage"
  location (X Y Z) 21 0 0, rotation 0 0 0
  bounding box size 44 12.5342 13.75
  Design: Length=44
  cross sections:
    n  XLocPercent  YLocPercent  ZLocPercent  shape
    0  0            0            0.0284091    rounded rectangle RoundRectXSec_Radius=0.2 RoundedRect_Height=3.8 RoundedRect_Width=10.56
    1  0.159091     0            -0.0386364   rounded rectangle RoundRectXSec_Radius=0.2 RoundedRect_Height=9.75 RoundedRect_Width=10.56
    2  0.340909     0            -0.0313636   rounded rectangle RoundRectXSec_Radius=0.2 RoundedRect_Height=13.75 RoundedRect_Width=10.56
    3  0.659091     0            -0.0313636   as above
    4  0.840909     0            -0.0386364   rounded rectangle RoundRectXSec_Radius=0.2 RoundedRect_Height=9.75 RoundedRect_Width=10.56
    5  1            0            0.0284091    rounded rectangle RoundRectXSec_Radius=0.2 RoundedRect_Height=3.8 RoundedRect_Width=10.56

Custom "Bulkhead 50", child of "Fuselage"
  location (X Y Z) 50.6957 0 -1.413, rotation 0 0 0
  bounding box size 1 12.56 13.68
  Design: Height=13.68 Length=1 SquareFlag=0 Width=12.56
  custom script Box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

Custom "Bulkhead 21", child of "Fuselage"
  location (X Y Z) 21 0 -0.000347826, rotation 0 0 0
  bounding box size 1 12.56 10.3
  Design: Height=10.3 Length=1 SquareFlag=0 Width=12.56
  custom script Box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

Custom "Bulkhead 66", child of "Fuselage"
  location (X Y Z) 65 0 0, rotation 0 0 0
  bounding box size 1 12.56 10.3
  Design: Height=10.3 Length=1 SquareFlag=0 Width=12.56
  custom script Box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

Custom "Bulkhead 34", child of "Fuselage"
  location (X Y Z) 34 0 0, rotation 0 0 0
  bounding box size 1 12.56 13.68
  Design: Height=13.68 Length=1 SquareFlag=0 Width=12.56
  custom script Box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

Fuselage "Internal Spars", child of "Fuselage"
  location (X Y Z) 6 3.75 1.5, rotation 0 0 0
  symmetric about XZ
  bounding box size 78.74 8.5 1
  Design: Length=78.74
  cross sections:
    n  XLocPercent  YLocPercent  ZLocPercent  shape
    0  0            0            0            circle Circle_Diameter=1
    1  0.5          0            0            circle Circle_Diameter=0.875
    2  1            0            0            as above

Custom "Rear wing clamps", child of "Internal Spars"
  location (X Y Z) 67 3.75 1.5, rotation 0 0 0
  symmetric about XZ
  bounding box size 1.1 9.25 2
  Design: Height=2 Length=1.1 SquareFlag=0 Width=1.75
  custom script Box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

Custom "Rear wing clamps (aft)", child of "Internal Spars"
  location (X Y Z) 76 3.75 1.5, rotation 0 0 0
  symmetric about XZ
  bounding box size 1.1 9.25 2
  Design: Height=2 Length=1.1 SquareFlag=0 Width=1.75
  custom script Box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

Custom "Front wing clamps", child of "Internal Spars"
  location (X Y Z) 7.2 3.75 1.5, rotation 0 0 0
  symmetric about XZ
  bounding box size 1.1 9.25 2
  Design: Height=2 Length=1.1 SquareFlag=0 Width=1.75
  custom script Box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

Custom "Front wing clamps aft", child of "Internal Spars"
  location (X Y Z) 11.382 3.75 1.5, rotation 0 0 0
  symmetric about XZ
  bounding box size 1.1 9.25 2
  Design: Height=2 Length=1.1 SquareFlag=0 Width=1.75
  custom script Box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

Stack "Payload", child of "Fuselage"
  location (X Y Z) 37.25 0 -3.85246, rotation 0 0 0
  bounding box size 12 8 8
  cross sections:
    n  XDelta  YDelta  ZDelta  shape
    0  0       0       0       point
    1  0       0       0       rounded rectangle RoundRectXSec_Radius=1 RoundedRect_Height=8 RoundedRect_Width=8
    2  12      0       0       as above
    3  0       0       0       point

Custom "6S Battery", child of "Fuselage"
  location (X Y Z) 26.5 0 -0.87, rotation 0 0 0
  bounding box size 7.36 2.93 3
  Design: Height=3 Length=7.36 SquareFlag=0 Width=2.93
  custom script Box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

Custom "6S Battery", child of "Fuselage"
  location (X Y Z) 53.1739 0 -0.869565, rotation 0 0 0
  bounding box size 7.36 2.93 3
  Design: Height=3 Length=7.36 SquareFlag=0 Width=2.93
  custom script Box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

Fuselage "Booms structures"
  location (X Y Z) 6 30 0.10082, rotation 0 0 0
  symmetric about XZ
  bounding box size 61 61.1811 1.1811
  Design: Length=61
  cross sections:
    n  XLocPercent  YLocPercent  ZLocPercent  shape
    0  0            0            0            circle Circle_Diameter=1.1811
    1  0.5          0            0            as above
    2  0.75         0            0            as above
    3  0.875        0            0            as above
    4  0.9375       0            0            as above
    5  0.96875      0            0            as above
    6  0.984375     0            0            as above
    7  1            0            0            as above

Fuselage "TestFuse"
  location (X Y Z) 8 0 0, rotation 0 0 0
  bounding box size 70 10.9799 13.8015
  Design: Length=70
  cross sections:
    n  XLocPercent  YLocPercent  ZLocPercent  shape
    0  0            0            -0.00866667  rounded rectangle RoundRectXSec_Radius=0.2 RoundedRect_Height=0.25 RoundedRect_Width=2.6
    1  0.0496678    0            -0.00285714  rounded rectangle RoundRectXSec_Radius=0.2 RoundedRect_Height=5.8 RoundedRect_Width=9.5
    2  0.185714     0            -0.00542857  rounded rectangle RoundRectXSec_Radius=0.2 RoundedRect_Height=10 RoundedRect_Width=10.56
    3  0.275        0            -0.0114286   rounded rectangle RoundRectXSec_Radius=0.2 RoundedRect_Height=12 RoundedRect_Width=10.56
    4  0.392857     0            -0.0188571   rounded rectangle RoundRectXSec_Radius=0.2 RoundedRect_Height=13.75 RoundedRect_Width=10.56
    5  0.596429     0            -0.0188571   as above
    6  0.714286     0            -0.011       rounded rectangle RoundRectXSec_Radius=0.2 RoundedRect_Height=12 RoundedRect_Width=10.56
    7  0.832143     0            -0.00571429  rounded rectangle RoundRectXSec_Radius=0.2 RoundedRect_Height=9 RoundedRect_Width=10
    8  0.89701      0            -0.00714286  rounded rectangle RoundRectXSec_Radius=0.2 RoundedRect_Height=7 RoundedRect_Width=8.5
    9  1            0            -0.0164286   rounded rectangle RoundRectXSec_Radius=0.2 RoundedRect_Height=0.25 RoundedRect_Width=3

Custom "Box", child of "TestFuse"
  location (X Y Z) 33.0435 6.52174 -10, rotation -45 0 0
  symmetric about XZ
  bounding box size 2.31903 17.6971 4.65363
  Design: Height=0.414605 Length=2.31903 SquareFlag=0 Width=6.16663
  custom script Box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

Custom "Single gear", child of "Box"
  location (X Y Z) 53.9094 -1.27156 -10.3911, rotation 0 45 90
  bounding box size 4.65363 2.31903 4.65363
  Design: Height=0.414605 Length=2.31903 SquareFlag=0 Width=6.16663
  custom script Box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

Custom "Box", child of "TestFuse"
  location (X Y Z) 50.163 6.52174 -10, rotation -45 0 0
  symmetric about XZ
  bounding box size 2.31903 18.013 4.96956
  Design: Height=0.414605 Length=2.31903 SquareFlag=0 Width=6.61341
  custom script Box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

Fuselage "Landing Rods", child of "TestFuse"
  location (X Y Z) 28.4615 8.37607 -12.1795, rotation 0 0 0
  symmetric about XZ
  bounding box size 30 17.7521 2.33275
  Design: Length=30
  cross sections:
    n  XLocPercent  YLocPercent  ZLocPercent  shape
    0  0            0            0.05         point
    1  0.2          0            0            circle Circle_Diameter=1
    2  0.5          0            0            as above
    3  0.75         0            0            as above
    4  1            0            0.05         point

VSPAERO settings: Sref=2400 bref=120 cref=20 Xcg=43 Ycg=0 Zcg=0 AlphaStart=0 AlphaEnd=10 AlphaNpts=3 BetaStart=0 BetaEnd=1 BetaNpts=1 MachStart=0 MachEnd=0 MachNpts=1 ReCref=1e+07 Vinf=100 Rho=0.002377
